// SBML level 2 version 1
// Created with PySCeS (0.8.0rc1) on Thu, 18 Jul 2013 17:57:50 by alex

model alon()

  // Compartments:
  compartment Cell = 1;

  // Species:
  species Y in Cell = 0;
  species X in Cell = 100;
  species X_a in Cell = 0;
  species S_y in Cell = 1000;
  species S_x in Cell = 1000;
  species Z in Cell = 0;
  species Y_a in Cell = 0;

  // Parameters:
  Beta_x = 1;
  Beta_y = 1;
  Beta_z = 1;
  K_xz = 10;
  K_yz = 10;
  K_xy = 10;

  // Reactions:
  activates_X: X => X_a; Beta_x;
  production_Y: => Y; Beta_y*2;
  activates_Y: Y => Y_a; Beta_y;
  activates_Z: => Z; Beta_z*2*2;

  // Unit definitions:
  unit volume = litre;
  unit length = metre;
  unit substance = mole;
  unit time = second;
  unit area = metre^2;
end
