// SBML level 2 version 1
// Created with PySCeS (0.8.0rc1) on Tue, 16 Jul 2013 13:42:17 by alex

model model0()

  // Compartments:
  compartment Cell = 1;

  // Species:
  species P_protein in Cell = 1;
  species T_repressed_promoter in Cell = 0;
  species T_activated_promoter in Cell = 0;
  species ATP_spent in Cell = 0;
  species ATP_gained in Cell = 0;
  species T_protein in Cell = 0;
  species PoorEnv in Cell = 0;
  species S in Cell = 100;
  species RichEnv in Cell = 1;
  species P_repressed_promoter in Cell = 0;
  species X_protein in Cell = 1;
  species T_mrna in Cell = 0;
  species P_activated_promoter in Cell = 0;
  species P_basal_promoter in Cell = 1;
  species X_basal_promoter in Cell = 1;
  species T_basal_promoter in Cell = 1;
  species P_mrna in Cell = 0;
  species Tstar_protein in Cell = 0;
  species X_mrna in Cell = 0;
  species X_activated_promoter in Cell = 0;
  species X_repressed_promoter in Cell = 0;

  // Parameters:
  activated_transcription_rate = 0.099;
  basal_transcription_rate = 0.065;
  repressed_transcription_rate = 0.031;
  translation_rate = 0.055;
  mRNA_degradation_rate = 0.0023;
  protein_degradation_rate = 0.0006;
  T_activation_rate = 100;
  T_deactivation_rate = 0.01;
  sugar_eating_rate = 25;
  sugar_entering_rate_rich = 1;
  sugar_entering_rate_poor = 1;
  env_switch_rate = 0.1;
  sugar_leaving_rate = 1;

  // Reactions:
  X_activated_transcription: => 2700 ATP_spent + X_mrna; activated_transcription_rate*X_activated_promoter;  // modifiers: X_activated_promoter
  X_basal_transcription: => 2700 ATP_spent + X_mrna; basal_transcription_rate*X_basal_promoter;  // modifiers: X_basal_promoter
  X_repressed_transcription: X_repressed_promoter => X_basal_promoter + 2700 ATP_spent + X_mrna; repressed_transcription_rate*X_repressed_promoter;
  X_translation: => X_protein + 1560 ATP_spent; translation_rate*X_mrna;  // modifiers: X_mrna
  X_mrna_deg: X_mrna => ; mRNA_degradation_rate*X_mrna;
  X_protein_deg: X_protein => ; protein_degradation_rate*X_protein;
  X_activates_P: P_basal_promoter + X_protein => P_activated_promoter; 1.307894*X_protein*P_basal_promoter;
  X_unactivates_P: P_activated_promoter => P_basal_promoter + X_protein; 1*P_activated_promoter;
  T_activated_transcription: => T_mrna + 2700 ATP_spent; activated_transcription_rate*T_activated_promoter;  // modifiers: T_activated_promoter
  T_basal_transcription: => T_mrna + 2700 ATP_spent; basal_transcription_rate*T_basal_promoter;  // modifiers: T_basal_promoter
  T_repressed_transcription: => 2700 ATP_spent + T_mrna; repressed_transcription_rate*T_repressed_promoter;  // modifiers: T_repressed_promoter
  T_translation: => 1560 ATP_spent + T_protein; translation_rate*T_mrna;  // modifiers: T_mrna
  T_mrna_deg: T_mrna => ; mRNA_degradation_rate*T_mrna;
  T_protein_deg: T_protein => ; protein_degradation_rate*T_protein;
  Tstar_protein_deg: Tstar_protein => ; protein_degradation_rate*Tstar_protein;
  T_protein_activates: T_protein => Tstar_protein; T_activation_rate*T_protein*S;  // modifiers: S
  Tstar_protein_inactivates: Tstar_protein => T_protein; T_deactivation_rate*Tstar_protein;
  Tstar_activates_P: P_basal_promoter + Tstar_protein => P_activated_promoter; 0.4493606*Tstar_protein*P_basal_promoter;
  Tstar_unactivates_P: P_activated_promoter => P_basal_promoter + Tstar_protein; 1*P_activated_promoter;
  Tstar_activates_X: X_basal_promoter + Tstar_protein => X_activated_promoter; 2.12525*Tstar_protein*X_basal_promoter;
  Tstar_unactivates_X: X_activated_promoter => X_basal_promoter + Tstar_protein; 1*X_activated_promoter;
  P_activated_transcription: => 2700 ATP_spent + P_mrna; activated_transcription_rate*P_activated_promoter;  // modifiers: P_activated_promoter
  P_basal_transcription: => 2700 ATP_spent + P_mrna; basal_transcription_rate*P_basal_promoter;  // modifiers: P_basal_promoter
  P_repressed_transcription: => 2700 ATP_spent + P_mrna; repressed_transcription_rate*P_repressed_promoter;  // modifiers: P_repressed_promoter
  P_translation: => P_protein + 1560 ATP_spent; translation_rate*P_mrna;  // modifiers: P_mrna
  P_mrna_deg: P_mrna => ; mRNA_degradation_rate*P_mrna;
  P_protein_deg: P_protein => ; protein_degradation_rate*P_protein;
  P_eats_sugar: S => 36 ATP_gained; sugar_eating_rate*P_protein*S;  // modifiers: P_protein
  Sugar_enters_system_Rich: => 600 S; sugar_entering_rate_rich*RichEnv;  // modifiers: RichEnv
  Sugar_enters_system_Poor: => 6 S; sugar_entering_rate_poor*PoorEnv;  // modifiers: PoorEnv
  Rich_to_Poor: RichEnv => PoorEnv; env_switch_rate*RichEnv;
  Poor_to_Rich: PoorEnv => RichEnv; env_switch_rate*PoorEnv;
  Sugar_leaves_system: S => ; sugar_leaving_rate*S;

  // Unit definitions:
  unit volume = litre;
  unit length = metre;
  unit substance = mole;
  unit time = second;
  unit area = metre^2;
end
