// SBML level 2 version 1
// Created with PySCeS (0.8.0rc1) on Mon, 24 Jun 2013 15:09:03 by calebsimmons

model _home_calebsimmons_Hungry_Monsters_tiny_monsters_model0()

  // Compartments:
  compartment Cell = 1;

  // Species:
  species P_protein in Cell = 10;
  species T_repressed_promoter in Cell = 0;
  species T_activated_promoter in Cell = 0;
  species T_protein in Cell = 0;
  species PoorEnv in Cell = 0;
  species S in Cell = 100;
  species RichEnv in Cell = 1;
  species ATP in Cell = 10000;
  species P_repressed_promoter in Cell = 0;
  species X_protein in Cell = 0;
  species T_mrna in Cell = 0;
  species P_activated_promoter in Cell = 0;
  species P_basal_promoter in Cell = 1;
  species X_basal_promoter in Cell = 1;
  species T_basal_promoter in Cell = 1;
  species P_mrna in Cell = 0;
  species Tstar_protein in Cell = 0;
  species X_mrna in Cell = 0;
  species X_activated_promoter in Cell = 0;
  species X_repressed_promoter in Cell = 0;

  // Parameters:
  activated_transcription_rate = 0.099;
  basal_transcription_rate = 0.065;
  repressed_transcription_rate = 0.031;
  translation_rate = 0.055;
  mRNA_degradation_rate = 0.0023;
  protein_degradation_rate = 0.0006;
  T_activation_rate = 100;
  T_deactivation_rate = 0.01;
  sugar_eating_rate = 500;
  sugar_entering_rate_rich = 6000;
  sugar_entering_rate_poor = 60;
  env_switch_rate = 0.1;
  sugar_leaving_rate = 1;

  // Reactions:
  X_activated_transcription: 2700 ATP => X_mrna; activated_transcription_rate*X_activated_promoter*(ATP/2700);  // modifiers: X_activated_promoter
  X_basal_transcription: 2700 ATP => X_mrna; basal_transcription_rate*X_basal_promoter*(ATP/2700);  // modifiers: X_basal_promoter
  X_repressed_transcription: 2700 ATP => X_mrna; repressed_transcription_rate*X_repressed_promoter*(ATP/2700);  // modifiers: X_repressed_promoter
  X_translation: 1560 ATP => X_protein; translation_rate*X_mrna*(ATP/1560);  // modifiers: X_mrna
  X_mrna_deg: X_mrna => ; mRNA_degradation_rate*X_mrna;
  X_protein_deg: X_protein => ; protein_degradation_rate*X_protein;
  X_activates_P: P_basal_promoter + X_protein => P_activated_promoter; 1.131613*X_protein*P_basal_promoter;
  X_unactivates_P: P_activated_promoter => P_basal_promoter + X_protein; 1*P_activated_promoter;
  T_activated_transcription: 2700 ATP => T_mrna; activated_transcription_rate*T_activated_promoter*(ATP/2700);  // modifiers: T_activated_promoter
  T_basal_transcription: 2700 ATP => T_mrna; basal_transcription_rate*T_basal_promoter*(ATP/2700);  // modifiers: T_basal_promoter
  T_repressed_transcription: 2700 ATP => T_mrna; repressed_transcription_rate*T_repressed_promoter*(ATP/2700);  // modifiers: T_repressed_promoter
  T_translation: 1560 ATP => T_protein; translation_rate*T_mrna*(ATP/1560);  // modifiers: T_mrna
  T_mrna_deg: T_mrna => ; mRNA_degradation_rate*T_mrna;
  T_protein_deg: T_protein => ; protein_degradation_rate*T_protein;
  Tstar_protein_deg: Tstar_protein => ; protein_degradation_rate*Tstar_protein;
  T_protein_activates: T_protein => Tstar_protein; T_activation_rate*T_protein*S;  // modifiers: S
  Tstar_protein_inactivates: Tstar_protein => T_protein; T_deactivation_rate*Tstar_protein;
  Tstar_activates_P: P_basal_promoter + Tstar_protein => P_activated_promoter; 0.8156768*Tstar_protein*P_basal_promoter;
  Tstar_unactivates_P: P_activated_promoter => P_basal_promoter + Tstar_protein; 1*P_activated_promoter;
  Tstar_activates_X: X_basal_promoter + Tstar_protein => X_activated_promoter; 0.4749186*Tstar_protein*X_basal_promoter;
  Tstar_unactivates_X: X_activated_promoter => X_basal_promoter + Tstar_protein; 1*X_activated_promoter;
  P_activated_transcription: 2700 ATP => P_mrna; activated_transcription_rate*P_activated_promoter*(ATP/2700);  // modifiers: P_activated_promoter
  P_basal_transcription: 2700 ATP => P_mrna; basal_transcription_rate*P_basal_promoter*(ATP/2700);  // modifiers: P_basal_promoter
  P_repressed_transcription: 2700 ATP => P_mrna; repressed_transcription_rate*P_repressed_promoter*(ATP/2700);  // modifiers: P_repressed_promoter
  P_translation: 1560 ATP => P_protein; translation_rate*P_mrna*(ATP/1560);  // modifiers: P_mrna
  P_mrna_deg: P_mrna => ; mRNA_degradation_rate*P_mrna;
  P_protein_deg: P_protein => ; protein_degradation_rate*P_protein;
  P_eats_sugar: S => 36 ATP; sugar_eating_rate*P_protein*S;  // modifiers: P_protein
  Sugar_enters_system_Rich: => S; sugar_entering_rate_rich*RichEnv;  // modifiers: RichEnv
  Sugar_enters_system_Poor: => S; sugar_entering_rate_poor*PoorEnv;  // modifiers: PoorEnv
  Rich_to_Poor: RichEnv => PoorEnv; env_switch_rate*RichEnv;
  Poor_to_Rich: PoorEnv => RichEnv; env_switch_rate*PoorEnv;
  Sugar_leaves_system: S => ; sugar_leaving_rate*S;

  // Unit definitions:
  unit volume = litre;
  unit length = metre;
  unit substance = mole;
  unit time = second;
  unit area = metre^2;
end
