// SBML level 2 version 1

model interactive()

  // Compartments:
  compartment default = 1;

  // Species:
  species RichEnv in default = 0; RichEnv is "RichEnv()";
  species PoorEnv in default = 1/default; PoorEnv is "PoorEnv()";
  species S in default = 0; S is "S()";
  species source in default = 1/default; source is "__source()";
  species sink in default = 0; sink is "__sink()";

  // Parameters:
  sugar_entering_rate_rich = 6000;
  sugar_entering_rate_poor = 60;
  env_switch_rate = 0.03333333;
  sugar_leaving_rate = 1;

  // Reactions:
  r0: RichEnv => RichEnv + S; RichEnv*sugar_entering_rate_rich;
  r1: PoorEnv => PoorEnv + S; PoorEnv*sugar_entering_rate_poor;
  r2: RichEnv => PoorEnv; env_switch_rate*RichEnv;
  r3: PoorEnv => RichEnv; env_switch_rate*PoorEnv;
  r4: S => sink; S*sugar_leaving_rate;
end
